y0 := -0.02 + 0.04*1i = -0.02 + 0.04i
y := -0.0138 + 0.0345*1i = -0.0138 + 0.0345i
|y0| = 0.0447214
arg(y0) = 2.03444
|y| = 0.0371576
arg(y) = 1.9513
0 - 90 + 116.565 = 26.565
0 - 90 + 111.801 = 21.801
y := -0.0133 + 0.0267*1i = -0.0133 + 0.0267i
28.8675 - 0.0338*110^2 + 110^2*cos(0)*0.0138*cos(0) + 110*115*0.02*cos(0) = 39.8675
|y| = 0.0298292
arg(y) = 2.03294
39.8675 - 40.732 = -0.8645
28.8675 - 0.0338*110^2 + 110*(110*0.037158*sin(0 - π/2 + 1.951303) + 115*(0.044721*sin(0 - π/2 + 2.034444))) = 39.8673
-46.1880 - 0.0271*110^2 + 110*(110*0.037158*sin(0 - π/2 + 1.951303) + 115*(0.029829*sin(0 - π/2 + 2.032945))) = -38.8722
sin(90*deg) = 1
-2*0.0338*110 + 1*(110*0.037158*sin(0 - π/2 - 1.951303) + 115*(0.044721*sin(0 - π/2 - 2.034444))) = -3.618
110*0.037158*sin(0 - π/2 - 1.951303) = 1.51802
-2*0.0271*110 + 1*(110*0.037158*sin(0 - π/2 - 1.951303) + 115*(0.029829*sin(0 - π/2 - 2.032945))) = -2.91449
110*(110*0.037158*cos(0 - π/2 - 1.951303) + 115*(0.044721*cos(0 - π/2 - 2.034444))) = -923.45
-110*110*0.037158*cos(0 - π/2 - 1.951303) = 417.454
115*(0.029829*sin(0 - π/2 - 2.032945)) = 1.52949
-2*0.0271*110 = -5.962
110*0.037158*sin(0 - π/2 - 1.951303) = 1.51802
-5.962 + 1.518016 + 1.529492 = -2.91449
-5.962 + 1.518016 = -4.44398
1/(10 + 1i*20) = 0.02 - 0.04i
10 + 1i*20
15 + 1i*30
1/(15 + 1i*30) = 0.0133333 - 0.0266667i
y := [
    0.0271 + 1i*0.0611, -0.0138 + 1i*0.0345, -0.0133 + 1i*0.0267;
    -0.0138 + 1i*0.0345, 0.0338 + 1i*0.0745, -0.02 + 1i*0.04
]
10 + 1i*25
1/(10 + 1i*25) = 0.0137931 - 0.0344828i
-(0.02 - 0.04i) = -0.02 + 0.04i
V := [110; 110; 115]
δ := [0; 0; 0]
Pl := [46.2; 0; 0]
Pg := [0; 28.9; 0]
-(0.013333 - 0.026667i) = -0.013333 + 0.026667i
-(0.013793 - 0.034483i) = -0.013793 + 0.034483i
Ql := [23.1; 0; 0]
Qg := [0; 17.3; 0]
[
    0.033793 - 0.074483i, -0.013793 + 0.034483i, -0.02 + 0.04i;
    -0.013793 + 0.034483i, 0, -0.013333 + 0.026667i
]
V := [110; 110; 115]
δ := [0; 0; 0]
0.013793 - 0.034483i + (0.02 - 0.04i) + 0 = 0.033793 - 0.074483i
φ(i) := -Re(y[i, i])*V[i]^2 + sum(V[i]*V[j]*|y[i, j]|*sin(δ[i] - δ[j] - π/2 - arg(y[i, j])), j = 0 .. 2) - V[i]*V[i]*|y[i, i]|*sin(δ[i] - δ[i] - π/2 - arg(y[i, i])) - Pl[i] + Pg[i]
ψ(i) := -Im(y[i, i])*V[i]^2 - sum(V[i]*V[j]*|y[i, j]|*cos(δ[i] - δ[j] - π/2 - arg(y[i, j])), j = 0 .. 2) - V[i]*V[i]*|y[i, i]|*cos(δ[i] - δ[i] - π/2 - arg(y[i, i])) - Ql[i] + Qg[i]
φ(0) = -38.885
ψ(0) = 1471.41
φ(1) = 39.9
ψ(1) = 1842.2
y := [
    0.014 + 0.0501*1i, -0.0079 + 0.0284*1i, 0, -0.0061 + 0.0218*1i;
    -0.0079 + 0.0284*1i, 0.0144 + 0.0643*1i, -0.036 + 0.0201*1i, -0.0029 + 0.016*1i;
    0, -0.036 + 0.0201*1i, 0.0078 + 0.0384*1i, -0.0042 + 0.0185*1i
]
sqrt(118.7^2 + 46.7^2) = 127.556
sqrt(10^2 + 8.3^2) = 12.9958
Pl := [70; 120; 120; 0]
Pg := [0; 0; 0; 0]
127.556184/12.995769 = 9.81521
118.7/10 = 11.87
46.7/8.3 = 5.62651
V := [220; 220; 220; 222]
δ := [0; 0; 0; 0]
Ql := [30; 65; 70; 0]
Qg := [0; 0; 0; 0]
-67.3348 + (-118.741) + (-118.1444) = -304.22
-10.9821 + (-33.4835) + (-46.8487) = -91.3143
sqrt(304.2202^2 + 91.3143^2) = 317.629
φ(k) := -Re(y[k, k])*V[k]^2 + sum(V[k]*V[j]*|y[k, j]|*sin(δ[k] - δ[j] - π/2 - arg(y[k, j])), j = 0 .. 3) - V[k]*V[k]*|y[k, k]|*sin(δ[k] - δ[k] - π/2 - arg(y[k, k])) - Pl[k] + Pg[k]
-2.5964 + (-9.2215) + (-9.9458) = -21.7637
-4.7753 + (-6.1147) + (-8.2987) = -19.1887
ψ(k) := Im(y[i, i])*V[i]^2 + sum(V[i]*V[j]*|y[i, j]|*cos(π/2 + δ[i] - δ[j] - arg(y[i, j])), j = 0 .. 3) - V[i]*V[i]*|y[i, i]|*cos(π/2 + δ[i] - δ[i] - arg(y[i, i])) - Ql[i] + Qg[i]  # error: Эта переменная не определена.
sqrt(21.7637^2 + 19.1887^2) = 29.0149
-Im(y[0, 0])*V[0]^2 - V[0]*(V[1]*|y[0, 1]|*cos(δ[0] - δ[1] - π/2 - arg(y[0, 1])) + V[2]*|y[0, 2]|*cos(δ[0] - δ[2] - π/2 - 0) + V[3]*|y[0, 3]|*cos(δ[0] - δ[3] - π/2 - arg(y[0, 3]))) - Ql[0] + Qg[0] = -15.568
317.629078/29.014907 = 10.9471
-Im(y[1, 1])*V[1]^2 - V[1]*(V[0]*|y[1, 0]|*cos(δ[1] - δ[0] - π/2 - arg(y[1, 0])) + V[2]*|y[1, 2]|*cos(δ[1] - δ[2] - π/2 - arg(y[1, 2])) + V[3]*|y[1, 3]|*cos(δ[1] - δ[3] - π/2 - arg(y[1, 3]))) - Ql[1] + Qg[1] = -48.28
-Im(y[2, 2])*V[2]^2 - V[2]*(V[0]*|y[2, 0]|*cos(δ[2] - δ[0] - π/2 - 0) + V[1]*|y[2, 1]|*cos(δ[2] - δ[1] - π/2 - arg(y[2, 1])) + V[3]*|y[2, 3]|*cos(δ[2] - δ[3] - π/2 - arg(y[2, 3]))) - Ql[2] + Qg[2] = -52.18
1/3 + 1/3 = 0.666667
1/31 + 1/31 = 0.0645161
2.93 + 1i*80.47 = 2.93 + 80.47i
-1/(2 + 60i) = -0.000554939 + 0.0166482i
-1/(2.93 + 80.47i) = -0.000451881 + 0.0124105i
-1/(1.5 + 54i) = -0.000514007 + 0.0185042i
(-0.001028 + 0.037008i) + (-0.006167 + 0.184978i) = -0.007195 + 0.221986i
ktr := [0.05, 0.09, 0.05; 0.09, 0.5, 0.5]
y := [
    0.249267 - 7.019552i, 1/0.09*(-0.000555 + 0.016648i), 1/0.05*(-0.000452 + 0.012411i);
    1/0.09*(-0.000555 + 0.016648i), 0.002612 - 0.090663i, 1/0.5*(-0.000514 + 0.018504i)
] = [
    0.249267 - 7.01955i, -0.00616667 + 0.184978i, -0.00904 + 0.24822i;
    -0.00616667 + 0.184978i, 0.002612 - 0.090663i, -0.001028 + 0.037008i
]
(1/0.05 - 1)/(0.05*(2.93 + 80.47i)) = 0.171715 - 4.716i
(1/0.5 - 1)/(0.5*(1.5 + 54i)) = 0.00102801 - 0.0370085i
Pg := [0; 20; 0]
Qg := [0; 7; 0]
V := [10; 110; 220]
δ := [0; 0; 0]
(1/0.09 - 1)/(0.09*(2 + 60i)) = 0.062345 - 1.87035i
(1 - 1/0.09)/(2 + 60i) = -0.00561105 + 0.168331i
(0.015207 - 0.433198i) + (0.171715 - 4.716004i) + (0.062345 - 1.87035i) = 0.249267 - 7.01955i
Pl := [20; 50; 0]
Ql := [5; 30; 0]
(0.007195 - 0.221986i) + (0.001028 - 0.037008i) + (-0.005611 + 0.168331i) = 0.002612 - 0.090663i
-Re(y[0, 0])*V[0]^2 + V[0]*V[1]*|y[0, 1]|*sin(δ[0] - δ[1] - π/2 - arg(y[0, 1])) + V[0]*V[2]*|y[0, 2]|*sin(δ[0] - δ[2] - π/2 - arg(y[0, 2])) - Pl[0] + Pg[0] = -18.2554
(0.015207 - 0.433198i) + (0.171715 - 4.716004i) = 0.186922 - 5.1492i
Im(y[0, 0])*V[0]^2 + V[0]*V[1]*|y[0, 1]|*cos(π/2 + δ[0] - δ[1] - arg(y[0, 1])) + V[0]*V[2]*|y[0, 2]|*cos(π/2 + δ[0] - δ[2] - arg(y[0, 2])) - Ql[0] + Qg[0] = 42.6044
(0.007195 - 0.221986i) + (0.001028 - 0.037008i) = 0.008223 - 0.258994i
-Re(y[1, 1])*V[1]^2 + V[1]*V[0]*|y[1, 0]|*sin(δ[1] - δ[0] - π/2 - arg(y[1, 0])) + V[1]*V[2]*|y[1, 2]|*sin(δ[1] - δ[2] - π/2 - arg(y[1, 2])) - Pl[1] + Pg[1] = -29.9443
Im(y[1, 1])*V[1]^2 + V[1]*V[0]*|y[1, 0]|*cos(π/2 + δ[1] - δ[0] - arg(y[1, 0])) + V[1]*V[2]*|y[1, 2]|*cos(π/2 + δ[1] - δ[2] - arg(y[1, 2])) - Ql[1] + Qg[1] = -20.9531
50/1*(0.83 - 0.3*110/110 + 0.47*(110/110)^2) = 50
k := |0.038 + 1i*0.5| = 0.501442
30/1*(3.7 - 7*110/110 + 4.3*(110/110)^2) = 30
κ := arg(1/(0.038 + 1i*0.5)) = -1.49494
a := 1/(k*(1.38 + 1i*89.57)) = 0.00034295 - 0.0222594i
0.038 + 1i*0.5
|0.038 + 1i*0.5| = 0.501442
b := (1/k - 1)/(k*(1.38 + 1i*89.57)) = 0.000340977 - 0.0221314i
50*(-0.3/110 + 2*0.47*(110/110^2)^1) = 0.290909
Z := 1.38 + 1i*89.57
a + b = 0.000683927 - 0.0443908i
50/110
y := [a + b, -a] = [0.000683927 - 0.0443908i, -0.00034295 + 0.0222594i]
30/110*(-3.7 + 2*4.3*(110/1)^1) = 256.991
Pg := [0; 0]
Qg := [0; 0]
V := [20; 500]
δ := [0; 0]
Pl := [300; 0]
Ql := [120; 0]
-Re(y[0, 0])*V[0]^2 + V[0]*V[1]*|y[0, 1]|*sin(δ[0] - δ[1] - π/2 - arg(y[0, 1]) + κ) - Pl[0] + Pg[0] = -78.0596
Im(y[0, 0])*V[0]^2 + V[0]*V[1]*|y[0, 1]|*cos(δ[0] - δ[1] + π/2 - arg(y[0, 1]) + κ) - Ql[0] + Qg[0] = -124.307
